/BATCH
RESUME,orbital,DB
/POST1
FILE,orbital,RTH
SET,LAST
*GET,NSETS,ACTIVE,0,SET,NSET
*DIM,NTEMP,ARRAY,12171
*DIM,NIDS,ARRAY,12171
*VFILL,NIDS(1),RAMP,1,1
*CFOPEN,nodal_temperatures,csv
*DO,ISTEP,1,NSETS
SET,,,,,,,ISTEP
*GET,TTIME,ACTIVE,0,SET,TIME
*VGET,NTEMP(1),NODE,1,TEMP
*VWRITE,TTIME,NIDS(1),NTEMP(1)
(F14.6,',',F10.0,',',E20.12)
*ENDDO
*CFCLOS
FINISH
/EXIT,NOSAVE
